## Airbus Vahana hybridizaton study
# reynolds.aero
# [area: 1. Input data]
# 1. Data by VAHANA open source  https://github.com/VahanaOpenSource/vahanaTradeStudy
# 1.1 Fixed mass per vehicle
payload := 113.3980  # kg
seat := 15  # kg
avionics := 15  # kg
servos := 7.8  # kg
ORIGIN := 1
tilt := 8  # kg
brs := 16  # kg
m := 450, 501 .. 1700
hub := 16  # kg
# 1.2 Optimized mass of components, kg
sc := 1
fuselage := [51.423; 52.752; 54.272; 55.943; 57.750; 59.694; 61.777; 64.007; 66.393; 68.945; 71.676; 74.601; 77.735; 81.098; 84.711; 88.597; 92.785; 97.307; 102.200; 107.507]
lg := [10.487; 11.325; 12.204; 13.117; 14.063; 15.044; 16.062; 17.118; 18.216; 19.358; 20.549; 21.79; 23.087; 24.444; 25.865; 27.357; 28.925; 30.578; 32.323; 34.171]
wing := [18.058; 19.280; 20.702; 22.259; 23.931; 25.712; 27.604; 29.611; 31.742; 34.005; 36.412; 38.975; 41.707; 44.624; 47.745; 51.091; 54.684; 58.551; 62.725; 67.24]
canard := [17.127; 18.230; 19.558; 21.034; 22.635; 24.353; 26.190; 28.151; 30.242; 32.475; 34.859; 37.409; 40.140; 43.068; 46.212; 49.596; 53.244; 57.186; 61.454; 66.089]
props := [12.633; 12.917; 13.601; 14.537; 15.664; 16.96; 18.413; 20.019; 21.783; 23.709; 25.807; 28.087; 30.563; 33.249; 36.163; 39.327; 42.763; 46.499; 50.568; 55.005]
wire := [18.153; 19.275; 20.491; 21.771; 23.113; 24.517; 25.989; 27.534; 29.161; 30.876; 32.688; 34.607; 36.643; 38.808; 41.113; 43.575; 46.21; 49.036; 52.076; 55.355]
motors := [35.357; 38.820; 42.238; 45.625; 49.013; 52.424; 55.884; 59.412; 63.026; 66.744; 70.582; 74.556; 78.682; 82.980; 87.466; 92.163; 97.093; 102.281; 107.756; 113.552]
battery := [122.25; 150.987; 180.467; 210.739; 241.874; 273.925; 306.960; 341.042; 376.239; 412.619; 450.259; 489.241; 529.657; 571.608; 615.207; 660.583; 707.880; 757.264; 808.927; 863.087]
# 1.3 Optimized propeller radius and tool cost per vehicle
r := [0.8512; 0.8499; 0.8638; 0.8862; 0.9139; 0.9455; 0.9801; 1.0170; 1.0560; 1.0969; 1.1395; 1.1838; 1.2298; 1.2773; 1.3266; 1.3775; 1.4303; 1.4849; 1.5416; 1.6004]
m
ToolCostPerVehicle := [1287.0; 1305.8; 1326.1; 1347.6; 1370.3; 1394.1; 1419.1; 1445.4; 1473.1; 1502.2; 1532.9; 1565.2; 1599.3; 1635.3; 1673.5; 1713.9; 1756.9; 1802.7; 1851.5; 1903.8]
# $
# 1.4 Structural mass from VAHANA open source
structural := wing + canard + props + hub + fuselage + lg
# 1.5 Take-off mass from VAHANA open source
M := 1.1*(payload + seat + avionics + servos + tilt + brs + motors + battery + wire + structural)
# 1.6 Interpolation of components mass
m_structural(m) := interp(pspline(M, structural), M, structural, m)
m_motors(m) := interp(pspline(M, motors), M, motors, m)
m_battery(m) := interp(pspline(M, battery), M, battery, m)
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# 1.7 Interpolation of propeller radius
r_prop(m) := interp(pspline(M, r), M, r, m)
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# 1.8 Interpolation of tool cost
ToolCostPerVehicle(m) := interp(pspline(M, ToolCostPerVehicle), M, ToolCostPerVehicle, m)
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# [area: 2. Cruise power]
# 2. Cruise power
# 2.1 Cruise speed
V_Cruise := 45.5  # m/s
# 2.2 Atmospheric pressure
ρ := 1.225  # kg/m^3
# 2.3 Fuselage / landing gear drag area
S_Cd.fuse := 0.35  # m^2
# 2.4 Stall velocity
V_Stall := 35  # m/s
# 2.5 Whole aircraft CL
Cl_Max := 1.1
# 2.6 Compute Wingspan assuming 2 props per wing with outboard props are at wingtips, 1 meter wide fuselage plus clearance between props and fuselage
b_Ref(m) := 6*r_prop(m) + 1.2  # m
# 2.7 Take-off weight
W(m) := m*9.8  # N
# 2.8 Compute reference area (counting both wings)
S_Ref(m) := W(m)/(0.5*ρ*V_Stall^2*Cl_Max)  # m^2
# 2.9  Equivalent aspect ratio
AR(m) := b_Ref(m)^2/S_Ref(m)
# 2.10 Wing profile drag coefficent
Cd_Wing := 0.012
# 2.11 Overall profile drag
Cd(m) := Cd_Wing + S_Cd.fuse/S_Ref(m)
# 2.12 Solve for CL at cruise
CL(m) := W(m)/(0.5*ρ*V_Cruise^2*S_Ref(m))
# 2.13 Motor efficiency
η_Motor := 0.85
# 2.14 Prop efficiency
η_Prop := 0.8
# 2.15 Span efficiency
e := 1.3
# 2.16 Estimate drag at cruise using quadratic drag polar
D_Cruise(m) := 0.5*ρ*V_Cruise^2*S_Ref(m)*(Cd(m) + CL(m)^2/(π*AR(m)*e))  # N  # Fixed fuselage drag double counting
# 2.17 Battery power
P_Cruise.Battery(m) := D_Cruise(m)*V_Cruise/(η_Prop*η_Motor)  # W
# 2.18 Solve for CL at cruise, where m.f - current vehicle mass (to estimate fuel reduction during flight)
CL_h(m, m_f) := W(m_f)/(0.5*ρ*V_Cruise^2*S_Ref(m))
# 2.19 Estimate drag at cruise using quadratic drag polar to estimate fuel reduction during flight
D_Cruise.h(m, m_f) := 0.5*ρ*V_Cruise^2*S_Ref(m)*(Cd(m) + CL_h(m, m_f)^2/(π*AR(m)*e))  # N
# 2.20 Battery power for estimate fuel reduction during flight
P_Cruise.Battery.h(m, m_f) := D_Cruise.h(m, m_f)*V_Cruise/(η_Prop*η_Motor)  # W
# [area: 3. Loiter power]
# 3. Loiter power
# 3.1 Lift coefficient at loiter a little below vehicle CLmax of ~1.1
Cl_Loiter := 1
# 3.2 Compute loiter velocity
V_Loiter(m) := sqrt(2*W(m)/(ρ*S_Ref(m)*Cl_Loiter))  # m/s
# 3.3 Compute drag
D_Loiter(m) := 0.5*ρ*V_Loiter(m)^2*S_Ref(m)*(Cd(m) + Cl_Loiter^2/(π*AR(m)*e))  # N  # Fixed fuselage drag double counting
# 3.4 Battery power
P_Loiter.Battery(m) := D_Loiter(m)*V_Loiter(m)/(η_Prop*η_Motor)  # W
# [area: 4. Hover power]
# 4. Hover power
# 4.1 Blade airfoil profile drag coefficient
Cd_0 := 0.012
# 4.2 Solidity (could estimate from Ct assuming some average blade CL)
σ := 0.1
# 4.2 Tip Mach number constraint for noise reasons at max thrust condition
M_tip := 0.65
# 4.3 Effective disk area factor (see "Helicopter Theory" Section 2-6.2)
k := 1.15
# 4.4 Max required T/W to handle rotor out w/ maneuver margin
TowerW := 1.7
# 4.5 Tip speed limit
V_tip := 340.294*M_tip/sqrt(TowerW) = 169.646  # m/s
# 4.6 Thrust per prop / rotor at hover
T_Hower(m) := W(m)/8  # N
# 4.7 Hover Power
P_Hover(m) := 8*T_Hower(m)*(k*sqrt(T_Hower(m)/(2*ρ*π*r_prop(m)^2)) + σ*Cd_0/8*V_tip^3/(T_Hower(m)/(ρ*π*r_prop(m)^2)))  # W
# 4.8 Battery power
P_Hover.Battery(m) := P_Hover(m)/η_Motor  # W
# [area: 5. Mission and propulsion property]
# 5. Mission and propulsion property
# 5.1 Compute hover time (180s reserve + 180s mission)
t_Hover := 180 + 180 = 360  # s
# 5.2 Loiter time reserve
t_Loiter := 17*60 = 1020  # s
# 5.3 Battery energy density
W_batt := 230  # Wh/kg
# 5.4 Battery discharge depth reserve
discharge_% := 0.95
# 5.5 Turbogenerator power density
W_gt := 2  # kW/kg
# 5.6 Fuel depth reserve
FuelDepthRes := 0.95
# 5.7 Turbogenerator power reserve
gtPowerRes := 1.10
# 5.8 Fuel heat capacity
Hu_kerosene := 43304.4  # MJ/kg
# 5.9 Turbogenerator efficiency
η_gt := 16.7 %
# 5.10 Specific fuel consumption
C_e := 3600/(Hu_kerosene*η_gt) = 0.497799  # kg/(kWt*h)
# 5.11 Estimated SFC degradation on partial load (from the separate gas turbine model)
N := [0.1; 0.2; 0.3; 0.4; 0.5; 0.6; 0.7; 0.8; 0.9; 1]
C_e. := [3.227; 2.137; 1.707; 1.47; 1.318; 1.21; 1.135; 1.077; 1.033; 1]
C_e%(N%) := interp(cspline(N, C_e.), N, C_e., N%)
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C_e.var(N%) := C_e*C_e%(N%)
# 5.12 C-rate limits (charge, discharge)
C_rate.max := 5
C_rate(t) :=
    C_rate.max if C_rate.max ≤ 3600/t
    3600/t otherwise
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# [area: 6. Scenario 1. All-electric eVTOL]
# 6. Scenario 1. All-electric eVTOL
# 6.1 Total energy in batteries
E_charge.1.t(m) := m_battery(m)*W_batt*discharge_%  # Wh
# 6.2 Cruise time
t_Cruise.1(m) := (E_charge.1.t(m)*3600 - P_Hover.Battery(m)*t_Hover - P_Loiter.Battery(m)*t_Loiter)/P_Cruise.Battery(m)  # s
# 6.3 Calculation of take-off mass by cruise time
m_TakeOff.1(t) :=
    root(t_Cruise.1(m) - t, m, 450, 2000) if t < t_Cruise.1(2000)
    NaN otherwise  # kg
# 6.4 Total battery mass
# Redundancy assumption: tolerance to 1/4 of battery fail (1 pack out of 4)
m_battery.1.m(m) :=
    if m < 2000
        m_battery(m) if 3/4*C_rate(t_Hover/2)*W_batt*m_battery(m) ≥ P_Hover.Battery(m)
        m_battery(m) + (P_Hover.Battery(m) - 3/4*C_rate(t_Hover/2)*W_batt*m_battery(m))/(3/4*C_rate(t_Hover/2)*W_batt) otherwise
    NaN otherwise
m_battery.1(t) := m_battery.1.m(m_TakeOff.1(t))  # kg
# 6.5 Energy required to charge batteries on the ground
E_charge.1.m(m) := E_charge.1.t(m) - t_Loiter*P_Loiter.Battery(m)/3600 - 0.5*t_Hover*P_Hover.Battery(m)/3600  # Wh
E_charge.1(t) := E_charge.1.m(m_TakeOff.1(t))  # Wh
# 6.6 Range
Range_1(t) := t*V_Cruise  # m
# [area: 7. Scenario 2. Hybrid VTOL]
# 7. Scenario 2. Hybrid VTOL
# 7.1 Energy required to charge batteries during cruise
E_charge.2.m(m) := 0.5*t_Hover*P_Hover.Battery(m)  # Ws
# 7.2 Power of turbogenerator required to cruise flight and to charge battery
P_gt.2(m, m_f, t_Cruise.2) := P_Cruise.Battery.h(m, m_f) + E_charge.2.m(m)/t_Cruise.2  # W
# 7.3 Battery mass for reserve
m_battery.reserve.2(m) := 0.5*t_Hover/3600*P_Hover.Battery(m)/(W_batt*discharge_%) + t_Loiter/3600*P_Loiter.Battery(m)/(W_batt*discharge_%)  # kg
# 7.4 Battery mass for hover
m_battery.hover.2(m) := 0.5*t_Hover/3600*P_Hover.Battery(m)/(W_batt*discharge_%)  # kg
# 7.5 Total battery mass
# Redundancy assumption: tolerance to 1/4 of battery fail (1 pack out of 4)
m_battery.2.m.(m) :=
    m_battery.2.m(m) ← m_battery.reserve.2(m) + m_battery.hover.2(m)
    m_battery.2.m(m) if 3/4*C_rate(t_Hover/2)*W_batt*m_battery.2.m(m) ≥ P_Hover.Battery(m)
    m_battery.2.m(m) + (P_Hover.Battery(m) - 3/4*C_rate(t_Hover/2)*W_batt*m_battery.2.m(m))/(3/4*C_rate(t_Hover/2)*W_batt) otherwise
# Battery charge rate review
m_battery.2.m(m, t) :=
    m_battery.2.m.(m) if C_rate(t)*W_batt*m_battery.2.m.(m) ≥ E_charge.2.m(m)/t
    m_battery.2.m.(m) + (E_charge.2.m(m) - C_rate(t)*W_batt*m_battery.2.m.(m)*t)/(C_rate(t)*W_batt*t) otherwise
# 7.6 Mass of turbogenerator to calculate cruise time
m_gt.2.m(m, t_Cruise.2) := gtPowerRes*P_gt.2(m, m, t_Cruise.2)/(1000*W_gt)  # kg
# 7.7 Mass of fuel to calculate cruise time
m_fuel.2.m(m, t_Cruise.2) := FuelDepthRes*(m_battery(m) - m_battery.2.m(m, t_Cruise.2) - m_gt.2.m(m, t_Cruise.2))  # kg
# 7.8 Cruise time
t_Cruise.2.f(m, t_Cruise.2) := integral(1000*3600/(C_e.var(P_gt.2(m, m_f, t_Cruise.2)/P_gt.2(m, m, t_Cruise.2))*P_gt.2(m, m_f, t_Cruise.2)), m_f = m - m_fuel.2.m(m, t_Cruise.2) .. m)
s
# 7.9 Calculation of take-off mass by cruise time
m_TakeOff.2(t_Cruise.2) := root(t_Cruise.2.f(m, t_Cruise.2) - t_Cruise.2, m, 450, 2000)  # kg
# 7.10 Turbogenerator mass
m_gt.2(t) := m_gt.2.m(m_TakeOff.2(t), t)  # kg
# 7.11 Fuel mass available for cruise
m_fuel.2(t) := m_fuel.2.m(m_TakeOff.2(t), t)  # kg
# 7.12 Total battery mass
m_battery.2(t) := m_battery.2.m(m_TakeOff.2(t), t)  # kg
# 7.13 Energy required to charge batteries on ground
E_charge.2(t) := 0  # Wh
# 7.14 Range
Range_2(t) := t*V_Cruise  # m
# [area: 8. Scenario 3. Hybrid VTOL]
# 8. Scenario 3. Hybrid VTOL
# 8.1 Battery mass for reserve
m_battery.reserve.3(m) := 0.5*t_Hover/3600*P_Hover.Battery(m)/(W_batt*discharge_%) + t_Loiter/3600*P_Loiter.Battery(m)/(W_batt*discharge_%)  # kg
# 8.2 Battery mass for hover
m_battery.hover.3(m) := 0.5*t_Hover/3600*P_Hover.Battery(m)/(W_batt*discharge_%)  # kg
# 8.3 Total battery mass
# Redundancy assumption: tolerance to 1/4 of battery fail (1 pack out of 4)
m_battery.3.m(m) :=
    m_battery.3.m(m) ← m_battery.reserve.3(m) + m_battery.hover.3(m)
    m_battery.3.m(m) if 3/4*C_rate(t_Hover/2)*W_batt*m_battery.3.m(m) ≥ P_Hover.Battery(m)
    m_battery.3.m(m) + (P_Hover.Battery(m) - 3/4*C_rate(t_Hover/2)*W_batt*m_battery.3.m(m))/(3/4*C_rate(t_Hover/2)*W_batt) otherwise
kg
# 8.4 Turbogenerator mass
m_gt.3.m(m) := gtPowerRes*P_Cruise.Battery(m)/(1000*W_gt)  # kg
# 8.5 Fuel mass available for cruise
m_fuel.3.m(m) := FuelDepthRes*(m_battery(m) - m_battery.3.m(m) - m_gt.3.m(m))  # kg
# 8.6 Power of turbogenerator required for cruise
P_gt.3(m, m_f) := P_Cruise.Battery.h(m, m_f)  # W
# 8.7 Cruise time by take-off mass
t_Cruise.3(m) := integral(1000*3600/(C_e.var(P_gt.3(m, m_f)/P_gt.3(m, m_f))*P_gt.3(m, m_f)), m_f = m - m_fuel.3.m(m) .. m)  # s
# 8.8 Calculation of take-off mass by cruise time
m_TakeOff.3(t) := root(t_Cruise.3(m) - t, m, 450, 2000)  # kg
# 8.9 Energy required to charge batteries on ground
E_charge.3(t) := 3/60*P_Hover.Battery(m_TakeOff.3(t))/discharge_%  # Wh
# 8.10 Battery mass
m_battery.3(t) := m_battery.3.m(m_TakeOff.3(t))  # kg
# 8.11 Mass of fuel
m_fuel.3(t) := m_fuel.3.m(m_TakeOff.3(t))  # kg
# 8.12 Mass of turbogenerator
m_gt.3(t) := m_gt.3.m(m_TakeOff.3(t))  # kg
# 8.13 Range
Range_3(t) := t*V_Cruise  # m
# [area: 9. Scenario 4. Hybrid VTOL]
# 9. Scenario 4. Hybrid VTOL
# 9.1 Energy required to charge batteries during cruise
E_charge.4.m(m) := 0.5*t_Hover*(P_Hover.Battery(m) - P_Cruise.Battery(m))  # Ws
# 9.2 Power of turbogenerator required to cruise flight and to charge battery
P_gt.4(m, m_f, t_Cruise.4) := P_Cruise.Battery.h(m, m_f) + E_charge.4.m(m)/t_Cruise.4  # W
# 9.3 Battery mass for reserve
m_battery.reserve.4(m) := 0.5*t_Hover/3600*P_Hover.Battery(m)/(W_batt*discharge_%)  # kg
# 9.4 Battery mass for hover
m_battery.hover.4(m) := 0.5*t_Hover/3600*(P_Hover.Battery(m) - P_Cruise.Battery(m))/(W_batt*discharge_%)  # kg
# 9.5 Total battery mass
# Redundancy assumption: tolerance to genset fail
m_battery.4.m.(m) :=
    m_battery.4.m(m) ← m_battery.reserve.4(m) + m_battery.hover.4(m)
    m_battery.4.m(m) if C_rate(t_Hover/2)*W_batt*m_battery.4.m(m) ≥ P_Hover.Battery(m)
    m_battery.4.m(m) + (P_Hover.Battery(m) - C_rate(t_Hover/2)*W_batt*m_battery.4.m(m))/(C_rate(t_Hover/2)*W_batt) otherwise
kg
# Redundancy assumption: tolerance to 1/4 of battery fail (1 pack out of 4).
# In case of failure, genset is able to provide 20% extra power as a short-term overload (emergency performance)
m_battery.4.m..(m) :=
    m_battery.4.m.(m) if 3/4*C_rate(t_Hover/2)*W_batt*m_battery.4.m.(m) + 1.2*P_Cruise.Battery(m) ≥ P_Hover.Battery(m)
    m_battery.4.m.(m) + (P_Hover.Battery(m) - 3/4*C_rate(t_Hover/2)*W_batt*m_battery.4.m.(m) - 1.2*P_Cruise.Battery(m))/(3/4*C_rate(t_Hover/2)*W_batt) otherwise
kg
# Battery charge C-rate check
m_battery.4.m(m, t) :=
    m_battery.4.m..(m) if C_rate(t)*W_batt*m_battery.4.m..(m) ≥ E_charge.4.m(m)/t
    m_battery.4.m..(m) + (E_charge.4.m(m) - C_rate(t)*W_batt*m_battery.4.m..(m)*t)/(C_rate(t)*W_batt*t) otherwise  # kg
# 9.6 Fuel reserve for loiter
m_fuel.Loiter.4(m) := t_Loiter/3600*P_Loiter.Battery(m)/1000*C_e.var(P_Loiter.Battery(m)/P_Hover.Battery(m))  # kg
# 9.7 Fuel for hover
m_fuel.Hover.4(m) := 0.5*t_Hover/3600*P_Cruise.Battery(m)/1000*C_e  # kg
# 9.8 Total fuel reserve
m_fuel.reserve.4(m) := m_fuel.Loiter.4(m)  # kg
# 9.9 Mass of turbogenerator for the cruise time calculation
m_gt.4.m(m, t_Cruise.4) := gtPowerRes*P_gt.4(m, m, t_Cruise.4)/(1000*W_gt)  # kg
# 9.10 Mass of fuel for cruise time calculation
m_fuel.4.m(m, t_Cruise.4) := FuelDepthRes*(m_battery(m) - m_battery.4.m(m, t_Cruise.4) - m_gt.4.m(m, t_Cruise.4)) - m_fuel.reserve.4(m) - m_fuel.Hover.4(m)
kg
# 9.11 Calculation of cruise time
t_Cruise.4(m, t) := integral(1000*3600/(C_e.var(P_gt.4(m, m_f, t)/P_gt.4(m, m, t))*P_gt.4(m, m_f, t)), m_f = m - m_fuel.4.m(m, t) - 0.5*m_fuel.Hover.4(m) .. m - 0.5*m_fuel.Hover.4(m))
s
# 9.12 Calcilation of Take-Off mass from cruise time
m_TakeOff.4(t) := root(t_Cruise.4(m, t) - t, m, 400, 2000)  # kg
# 9.13 Turbogenerator mass
m_gt.4(t) := m_gt.4.m(m_TakeOff.4(t), t)  # kg
# 9.14 Battery mass
m_battery.4(t) := m_battery.4.m(m_TakeOff.4(t), t)  # kg
# 9.15 Mass of fuel
m_fuel.4(t) := m_fuel.4.m(m_TakeOff.4(t), t) + m_fuel.Hover.4(m_TakeOff.4(t))  # kg
# 9.16 Energy required to charge batteries on the ground
E_charge.4(t) := 0  # Wh
# 9.16 Range
Range_4(t) := t*V_Cruise  # m
# [area: 10. Scenario 5. Hybrid VTOL]
# 10. Scenario 5. Hybrid VTOL
# 10.1 Battery mass for reserve
m_battery.reserve.5(m) := 0.5*t_Hover/3600*P_Hover.Battery(m)/(W_batt*discharge_%)  # kg
# 10.2 Battery mass for hover
m_battery.hover.5(m) := 0.5*t_Hover/3600*(P_Hover.Battery(m) - P_Cruise.Battery(m))/(W_batt*discharge_%)  # kg
# 10.3 Total battery mass
# Redundancy assumption: tolerance to genset fail
m_battery.5.m.(m) :=
    m_battery.5.m(m) ← m_battery.reserve.5(m) + m_battery.hover.5(m)
    m_battery.5.m(m) if C_rate(t_Hover/2)*W_batt*m_battery.5.m(m) ≥ P_Hover.Battery(m)
    m_battery.5.m(m) + (P_Hover.Battery(m) - C_rate(t_Hover/2)*W_batt*m_battery.5.m(m))/(C_rate(t_Hover/2)*W_batt) otherwise
kg
# Redundancy assumption: tolerance to 1/4 of battery fail (1 pack out of 4).
# In case of failure, genset is able to provide 20% extra power as a short-term overload (emergency performance)
m_battery.5.m(m) :=
    m_battery.5.m.(m) if 3/4*C_rate(t_Hover/2)*W_batt*m_battery.5.m.(m) + 1.2*P_Cruise.Battery(m) ≥ P_Hover.Battery(m)
    m_battery.5.m.(m) + (P_Hover.Battery(m) - 3/4*C_rate(t_Hover/2)*W_batt*m_battery.5.m.(m) - 1.2*P_Cruise.Battery(m))/(3/4*C_rate(t_Hover/2)*W_batt) otherwise
kg
# 10.4 Fuel reserve for loiter
m_fuel.Loiter.5(m) := t_Loiter/3600*P_Loiter.Battery(m)/1000*C_e.var(P_Loiter.Battery(m)/P_Hover.Battery(m))  # kg
# 10.5 Fuel for hover
m_fuel.Hover.5(m) := 0.5*t_Hover/3600*P_Cruise.Battery(m)/1000*C_e  # kg
# 10.6 Total fuel reserve
m_fuel.reserve.5(m) := m_fuel.Loiter.5(m)  # kg
# 10.7 Mass of turbogenerator
m_gt.5.m(m) := gtPowerRes*P_Cruise.Battery(m)/(1000*W_gt)  # kg
# 10.8 Power of turbogenerator required for cruise
P_gt.5(m, m_f) := P_Cruise.Battery.h(m, m_f)  # W
# 10.9 Mass of fuel available for cruise
m_fuel.5.m(m) := FuelDepthRes*(m_battery(m) - m_battery.5.m(m) - m_gt.5.m(m)) - m_fuel.reserve.5(m) - m_fuel.Hover.5(m)  # kg
# 10.10 Cruise time from Take-Off mass
t_Cruise.5(m) := integral(1000*3600/(C_e.var(P_gt.5(m, m_f)/P_gt.5(m, m))*P_gt.5(m, m_f)), m_f = m - m_fuel.5.m(m) - 0.5*m_fuel.Hover.5(m) .. m - 0.5*m_fuel.Hover.5(m))
s
# 10.11 Calculation of take-off mass by cruise time
m_TakeOff.5(t) := root(t_Cruise.5(m) - t, m, 400, 2000)  # kg
# 10.12 Mass of turbogenerator
m_gt.5(t) := m_gt.5.m(m_TakeOff.5(t))  # kg
# 10.13 Mass of fuel
m_fuel.5(t) := m_fuel.5.m(m_TakeOff.5(t)) + m_fuel.Hover.5(m_TakeOff.5(t))  # kg
# 10.14 Energy required to charge batteries on the ground
E_charge.5(t) := 3/60*(P_Hover.Battery(m_TakeOff.5(t)) - P_Cruise.Battery(m_TakeOff.5(t)))/discharge_%  # Wh
# 10.15 Battery mass
m_battery.5(t) := m_battery.5.m(m_TakeOff.5(t))  # kg
# 10.16 Range
Range_5(t) := t*V_Cruise  # m
# [area: 11. Scenario 6. Gas turbine VTOL]
# 11. Scenario 6. Gas turbine VTOL
# 11.1 Total fuel reserve
m_fuel.reserve.6(m) := 0.5*t_Hover/3600*P_Hover.Battery(m)/1000*C_e + t_Loiter/3600*P_Loiter.Battery(m)/1000*C_e.var(P_Loiter.Battery(m)/P_Hover.Battery(m))  # kg
# 11.2 Fuel mass for hover
m_fuel.hover.6(m) := 0.5*t_Hover/3600*P_Hover.Battery(m)/1000*C_e  # kg
# 11.3 Maximum power of turbogenerator required for cruise or hover
P_gt.6(m) :=
    P_Hover.Battery(m) if P_Cruise.Battery(m) ≤ P_Hover.Battery(m)
    P_Cruise.Battery(m) otherwise  # W
# 11.4 Mass of turbogenerator
# 2 genset units installed for this scenario, working simultaniously on partial load. In case of 1 unit fail, the other can provide hover power by overloading by 20% (emergency performance)
m_gt.6.m(m) := 2/1.2*gtPowerRes*P_gt.6(m)/(1000*W_gt)  # kg
# 11.5 Mass of fuel available for cruise
m_fuel.6.m(m) := FuelDepthRes*(m_battery(m) - m_gt.6.m(m)) - m_fuel.reserve.6(m) - m_fuel.hover.6(m)  # kg
# 11.6 Cruise time
t_Cruise.6(m) := integral(1000*3600/(C_e.var(P_Cruise.Battery.h(m, m_f)/(2/1.2*P_Cruise.Battery.h(m, m)))*P_Cruise.Battery.h(m, m_f)), m_f = m - m_fuel.6.m(m) + 0.5*m_fuel.hover.6(m) .. m - 0.5*m_fuel.hover.6(m))
s
# 11.7 Calculation of take-off mass by cruise time
m_TakeOff.6(t) := root(t_Cruise.6(m) - t, m, 400, 2000)  # kg
# 11.8 Mass of turbogenerator
m_gt.6(t) := m_gt.6.m(m_TakeOff.6(t))  # kg
# 11.9 Mass of fuel
m_fuel.6(t) := m_fuel.6.m(m_TakeOff.6(t))  # kg
# 11.10 Battery mass
m_battery.6(m) := 0  # kg
# 11.11 Energy required for charging batteries on ground
E_charge.6(m) := 0  # Wh
# 11.12 Range
Range_6(t) := t*V_Cruise  # m
# [area: 12. Operating cost]
# 12. Operating cost
# 12.1 Flight hours per year
h_perYear := 600  # h
# 12.2 Vehicle life years
VehicleLifeYears := 10  # year
# 12.3 Size of storage depot
nVehiclesPerFacility := 200
# 12.4 Turbogenerator cost per kW
GTCostPerKW := 1500  # $/kW
# 12.5  Range
Range(t) := t*V_Cruise/1000  # km
# 12.5 Flight time per mission
t_h(t) := (t + 180)/3600  # h
# 12.6 Flights per year
FlightsPerYear(t) := h_perYear/t_h(t)
# 12.7 Aquisition cost
# 12.7.1 Battery mass for each vehicle
m_battery.(type, t) :=
    m_battery.1(t) if type == 1
    m_battery.2(t) if type == 2
    m_battery.3(t) if type == 3
    m_battery.4(t) if type == 4
    m_battery.5(t) if type == 5
    m_battery.6(t) if type == 6
kg
# 12.7.2 Take off mass for each vehicle
m_TakeOff(type, t) :=
    m_TakeOff.1(t) if type == 1
    m_TakeOff.2(t) if type == 2
    m_TakeOff.3(t) if type == 3
    m_TakeOff.4(t) if type == 4
    m_TakeOff.5(t) if type == 5
    m_TakeOff.6(t) if type == 6
kg
# 12.7.3 Battery cost per kg
BatteryCostPerKg := 161  # $/kg
# 12.7.4 Battery cost
BatteryCost(type, t) := BatteryCostPerKg*m_battery.(type, t)  # $
# 12.7.5 Motor cost per kg
MotorCostPerKg := 150  # $/kg
# 12.7.6 Motor cost
MotorCost(type, t) := MotorCostPerKg*m_motors(m_TakeOff(type, t))  # $
# 12.7.7 Servo cost (14 = 8 props, 4 surfaces, 2 tilt)
ServoCost := 14*800 = 11200  # $
# 12.7.8 Avionics cost, guess for all sensors and computers in large quantities
AvionicsCost := 30000  # $
# 12.7.9 BRS Cost
BRSCost := 5200  # $
# 12.7.10 Material cost per kg
MaterialCostPerKg := 220  # $/kg
# 12.7.11 Material cost
MaterialCost(type, t) := MaterialCostPerKg*m_structural(m_TakeOff(type, t))
# $
# 12.7.12 Turbogenerator mass
m_gt(type, t) :=
    0 if type == 1
    m_gt.2(t) if type == 2
    m_gt.3(t) if type == 3
    m_gt.4(t) if type == 4
    m_gt.5(t) if type == 5
    m_gt.6(t) if type == 6
kg
# 12.7.13 Turbogenerator power
P_gt(type, t) := m_gt(type, t)*W_gt/gtPowerRes  # kW
# 12.7.14 Turbogenerator cost
GTCost(type, t) := GTCostPerKW*P_gt(type, t)  # $
# 12.7.15 Total aquisition cost
AcquisitionCost(type, t) := BatteryCost(type, t) + MotorCost(type, t) + ServoCost + AvionicsCost + BRSCost + MaterialCost(type, t) + ToolCostPerVehicle(t) + GTCost(type, t)
# $
# 12.7.16 Aquisition cost per flight (costs of batteries, motors, servos and turbogenerator added in 12.12-12.15)
AcquisitionCostPerFlight(type, t) := (AcquisitionCost(type, t) - BatteryCost(type, t) - MotorCost(type, t) - GTCost(type, t) - ServoCost)/(VehicleLifeYears*FlightsPerYear(t))
# $/flight
# 12.8.1 Insurance cost per year (Follow R22 for estimate of 6.5% of acquisition cost)
InsuranceCostPerYear(type, t) := AcquisitionCost(type, t)*0.065  # $/year
# 12.8.1 Insurance cost per flight
InsuranceCostPerFlight(type, t) := InsuranceCostPerYear(type, t)/FlightsPerYear(t)  # $/flight
# 12.9 Facility rental cost
# 12.9.1 Vehicle footprint
VehicleFootprint(m) := 1.2*(8*r_prop(m) + 1)*(4*r_prop(m) + 3)  # m^2  # Extra 20% is to move around aircraft during maintenance, etc.
VehicleFootprint(type, t) := VehicleFootprint(m_TakeOff(type, t))
AreaCost := 10.7639*2*12 = 258.334  # $/m^2, $2/ft^2 per month assumed
# 12.9.2 Facility cost per year
FacilityCostPerYear(type, t) := (VehicleFootprint(type, t) + 10*VehicleFootprint(type, t)/nVehiclesPerFacility)*AreaCost  # $/year
# 12.9.2 Facility cost per flight hour
FacilityCostPerFlightHour(type, t) := FacilityCostPerYear(type, t)/h_perYear  # $/hour
# 12.9.2 Facility cost per flight
FacilityCostPerFlight(type, t) := FacilityCostPerFlightHour(type, t)*t_h(t)  # $/flight
# 12.10 Electricity cost
# 12.10.1 Electrical energy in battery for charging
E_charge(type, t) :=
    E_charge.1(t) if type == 1
    E_charge.2(t) if type == 2
    E_charge.3(t) if type == 3
    E_charge.4(t) if type == 4
    E_charge.5(t) if type == 5
    E_charge.6(t) if type == 6
Wh
# 12.10.1 Electricity cost per flight
# 90% charging efficiency
# Average US electricity cost is $0.12 per kW-hr
EnergyCostPerFlight(type, t) := 0.12*E_charge(type, t)/(0.9*1000)  # $/flight
# 12.11 Fuel cost
# 12.11.1 Mass of kerosene for refueling
m_fuel(type, t) :=
    0 if type == 1
    m_fuel.2(t) if type == 2
    m_fuel.3(t) if type == 3
    m_fuel.4(t) if type == 4
    m_fuel.5(t) if type == 5
    m_fuel.6(t) if type == 6
kg
# 12.11.2 Kerosene cost per kg
DollarPerKg := 1  # $/kg
# 12.11.2 Kerosene cost per flight
FuelCostPerFlight(type, t) := DollarPerKg*m_fuel(type, t)  # $/flight
# 12.12 Battery replacement cost
BatteryLifeCycles := 2000  # 1 cycle per flight
BatteryReplCostPerFlight(type, t) := BatteryCost(type, t)/BatteryLifeCycles  # $/flight
# 12.13 Motor replacement cost
MotorLifeHrs := 6000  # h
MotorReplCostPerFlight(type, t) := t_h(t)*MotorCost(type, t)/MotorLifeHrs  # $/flight
# 12.14 Gas turbine replacement cost
GTLifeHrs := 6000  # h
GTReplCostPerFlight(type, t) := t_h(t)*GTCost(type, t)/GTLifeHrs  # $/flight
# 12.15 Servo replacement cost
ServoLifeHrs := 6000  # h
ServoReplCostPerFlight(t) := t_h(t)*ServoCost/ServoLifeHrs  # $/flight
# 12.16 Maintenance cost
HumanCostPerHour := 60  # $/h
# Periodic maintenance estimate
ManHrPerFlightHour := 0.1  # $/flighthour
# Inspection, battery swap estimate
ManHrPerFlight := 0.2  # $/flight
LaborCostPerFlight(t) := (ManHrPerFlightHour*t_h(t) + ManHrPerFlight)*HumanCostPerHour
# 12.17 Cost per flight
CostPerFlight(type, t) := AcquisitionCostPerFlight(type, t) + InsuranceCostPerFlight(type, t) + FacilityCostPerFlight(type, t) + EnergyCostPerFlight(type, t) + FuelCostPerFlight(type, t) + BatteryReplCostPerFlight(type, t) + MotorReplCostPerFlight(type, t) + GTReplCostPerFlight(type, t) + ServoReplCostPerFlight(t) + LaborCostPerFlight(t)
# $/flight
# 12.18 Cost per flight
CostPerKm(type, t) := CostPerFlight(type, t)/Range(t)  # $/km
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# Scenarios summarized
# The DOC/km is in the chart below. For detailed anaysis, go to bluepaper in the repository.
t := 300, 600 .. 3600*3
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# For the raw data, choose the scenario below
# [component: outputs sc]
t_h(t) = [
    0.133333; 0.216667; 0.3; 0.383333; 0.466667; 0.55; 0.633333; 0.716667; 0.8; 0.883333
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]  # h
Range(t) = [
    13.65; 27.3; 40.95; 54.6; 68.25; 81.9; 95.55; 109.2; 122.85; 136.5
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]  # km
CostPerFlight(sc, t) = [
    43.5399; 49.6052; 57.4698; 65.7896; 74.3258; 83.0034; 91.7926; 100.679; 109.657; 118.722
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]  # $
AcquisitionCost(sc, t) = [
    295040; 229145; 210165; 201540; 196859; 194100; 192425; 191421; 190866; 190623
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]  # $
m_TakeOff(sc, t) = [
    663.282; 615.017; 604.18; 601.676; 602.371; 604.64; 607.808; 611.543; 615.664; 620.063
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]  # kg
m_battery.(sc, t) = [
    142.048; 131.083; 128.56; 127.973; 128.136; 128.667; 129.407; 130.277; 131.233; 132.251
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]  # kg
m_fuel(sc, t) = [
    5.14022; 6.83928; 8.74057; 10.7005; 12.6928; 14.7089; 16.7452; 18.7999; 20.8719; 22.9605
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]  # kg
# For the full study results and description, look at the relevant pdf in the repository
